*Heading
** Job name: Job-1 Model name: Model-1
** Generated by: Abaqus/CAE 6.14-3
*Preprint, echo=NO, model=NO, history=NO, contact=NO
** ----------------------------------------------------------------
**
** PART INSTANCE: Part-1-1
**
*Node
      1,  -0.1, -0.1, 1.0
      2,  -0.1,  0.,  1.0
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*Element, type=C3D8
 1, 34, 35, 38, 37,  1,  2,  5,  4
 2, 35, 36, 39, 38,  2,  3,  6,  5
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*Nset, nset=NodeAll, generate
  1,  99,   1
*Elset, elset=ElemAll, generate
  1,  40,   1
** Section: Section-1
*Solid Section, elset=ElemAll, material=STEEL
,
*System
**
** MATERIALS
**
*Material, name=Steel
*Density
7800.,
*Elastic
 2.1e+11, 0.3
*STEP, NAME=Global_STIFFNESS
*MATRIX GENERATE, STIFFNESS, MASS, LOAD
*MATRIX OUTPUT, STIFFNESS=YES, MASS=YES, LOAD=YES, FORMAT=COORDINATE
*Dload
ElemAll, GRAV, 9.82,0,-1,0
*END STEP
*STEP, PERTURBATION
*FREQUENCY
30,
*END STEP
