*Heading
** Job name: Job-1 Model name: SoftBar
** Generated by: Abaqus/CAE 6.14-3
*Preprint, echo=NO, model=NO, history=NO, contact=NO
** ----------------------------------------------------------------
**
** PART INSTANCE: PART-1-1
**
*Node
      1, -0.100000001, -0.100000001,           1.
      2, -0.100000001,           0.,           1.
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*Element, type=C3D8
 1, 34, 35, 38, 37,  1,  2,  5,  4
 2, 35, 36, 39, 38,  2,  3,  6,  5
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*Elset, elset=ELEMALL, generate
  1,  40,   1
*Nset, nset=nodeEnd1
 65,
*Nset, nset=nodeEnd2
 35,
** Section: ELEMALL
*Solid Section, elset=ELEMALL, material=STEEL
,
*Spring, elset=X-spring
1
5e+06
*Spring, elset=Y-spring
2
5e+06
*Spring, elset=Z-spring
3
5e+06
*Element, type=Spring1, elset=X-spring
41, 65
*Element, type=Spring1, elset=Y-spring
42, 65
*Element, type=Spring1, elset=Z-spring
43, 65
*Element, type=Spring1, elset=X-spring
44, 35
*Element, type=Spring1, elset=Y-spring
45, 35
*Element, type=Spring1, elset=Z-spring
46, 35
*System
*Nset, nset=NODEALL, generate
  1,  99,   1
**
** MATERIALS
**
*Material, name=STEEL
*Density
7800.,
*Elastic
 2.1e+09, 0.3
** ----------------------------------------------------------------
** ANALYSIS DEFINITION
** ----------------------------------------------------------------
*Step, Name=Transient dynamic, inc=2000
*Dynamic
  0.001, 1.0
*Dload
ElemAll, GRAV, 9.82,0,-1,0
*Output, field
*Node Output
U
*Element Output
S
*Output, history, variable=PRESELECT, time interval=0.001
*Node Output, NSET=NODEALL
U
*End Step
